# echo both
# log results/log.liggghts

units		si
atom_style	ellipsoid # granular #
atom_modify	map array

communicate	single vel yes

boundary	p p p
newton		off

processors * * *
# turn off sorting (Nfreq is set to 0)
atom_modify map array sort 0 2.0

region		box block -1e-2 1e-2 -1e-2 1e-2 -1e-2 1e-2 units box
create_box	1 box

#building of pairwise neighbor lists
#variable	skin equal 1e-8
#neighbor	${skin} bin
#neigh_modify	delay 0 binsize 1e-2 one 10


fix 		m1 all property/global youngsModulus peratomtype 1e6
fix 		m2 all property/global poissonsRatio peratomtype 0.4
fix 		m3 all property/global coefficientRestitution peratomtypepair 1 0.02
fix 		m4 all property/global coefficientFriction peratomtypepair 1 0.45
fix 		m5 all property/global coefficientRollingFriction peratomtypepair 1 0.020


# lb coupling fix
fix lbcoupling all couple/lb/onetoone
# fix		hdtorque all property/atom hdtorque vector yes yes yes 0 0 -1e-9

# pair_style	gran model hertz tangential history rolling_friction cdt #granular potential with Hertzian interactions
# pair_coeff	* * #For granular styles there are no additional coefficients to set for each pair of atom types

fix		1 all nve/asphere # nve/sphere
create_atoms 1 single ${center} ${center} ${center}
set atom 1 mass ${mass} shape ${dx_part} ${dy_part} ${dz_part} quat 0 0 1 90 angmom 0 0 -1.7e-15 #density 3970 diameter ${dx_part} #
#velocity all setAngular 0 0 -2.3984242e-15 #initial angular momentum M = inertia(=0.2*mass*(rx*rx+ry*ry)) * omega(=1283.5)


#pair_style   gayberne 1.0 3.0 1.0 4.0
#pair_coeff   1 1 3.0 1.0 1 1 1 1 1 1 2.5
# pair_coeff   1 2 3.0 1.0 1 1 1 0 0 0
# pair_coeff   2 2 1.0 1.0 1 1 0.2 0 0 0


#fix ywalls1 all wall/gran model hertz tangential history primitive type 1 yplane 0.
#fix ywalls2 all wall/gran model hertz tangential history primitive type 1 yplane 100
#fix zwalls1 all wall/gran model hertz tangential history primitive type 1 zplane 0.
#fix zwalls2 all wall/gran model hertz tangential history primitive type 1 zplane 100

run 1
